i := sqrt(-1)
E := 100
Z_1 := 6 + 8i
Z_2 := 7 - 3i
Z_1 := sqrt(6^2 + 8^2)*e^(atan(8/6)*i)
Z_2 := sqrt(7^2 + 3^2)*e^(atan(-3/7)*i)
A_1 := sqrt(6^2 + 8^2) = 10
A_2 := sqrt(7^2 + 3^2) = 7.61577
φ_1 := atan(8/6) = 53.1301 deg
φ_2 := atan(-3/7) = -23.1986 deg
Z_1 := A_1*e^(φ_1*i)
Z_2 := A_2*e^(φ_2*i)
10*e^(-63.43495 deg*i)
7.61577*e^(63.43495 deg*i)
Z_3 := 2 + 3i
Z_3 := sqrt(2^2 + 3^2)*e^(atan(3/2)*i)
A_3 := sqrt(2^2 + 3^2) = 3.60555
φ_3 := atan(3/2) = 56.3099 deg
A_U4 := sqrt(22.78856^2 + 6.2676^2) = 23.6347
Z_3 := A_3*e^(φ_3*i)
φ_2 := atan(-6.2676/22.78856) = -15.378 deg
3.60555*e^(56.30993 deg*i)
U_4 := A_U4*e^(φ_2*i)
Z_4 := Z_2*Z_3/(Z_2 + Z_3) = 2.55556 + 1.66667i
23.63475*e^(-15.37799*deg*i)
Z_5 := Z_1 + Z_4 = 8.55556 + 9.66667i
A_I2 := sqrt(3.07453^2 + 0.42228^2) = 3.10339
I_1 := E/Z_5 = 5.13409 - 5.80086i
φ_2 := atan(0.42228i/3.07453) = 7.9195i deg
100/(4.46154 + 0.69231i)
U_4 := A_U4*e^(φ_2*i)
I_1 = 5.13409 - 5.80086i
3.10339*e^(7.9195i*deg*i)
U_4 := I_1*Z_4 = 22.7886 - 6.2676i
I_2 := U_4/Z_2 = 3.07453 + 0.422285i
A_I2 := sqrt(2.05956^2 + 6.22314^2) = 6.55509
I_2 = 3.07453 + 0.422285i
φ_2 := atan(-6.22314/2.05956) = -71.6879 deg
I_3 := U_4/Z_3 = 2.05956 - 6.22314i
U_4 := A_U4*e^(φ_2*i)
6.55509*e^(-71.68794*deg*i)
I_1 - I_2 - I_3 = -4.44089e-16 - 8.88178e-16i
(5.13409 - 5.80086i) - (3.07453 + 0.42228i) - (3.16671 - 4.75007i) = -1.10715 - 1.47307i
I_1 - I_2 - I_3 = -4.44089e-16 - 8.88178e-16i
