i := sqrt(-1)
E := 100
Z_1 := 6 + 8i
Z_2 := 7 - 3i
Z_3 := 2 + 3i
Z_4 := Z_2*Z_3/(Z_2 + Z_3) = 2.55556 + 1.66667i
(7 - 3i)*(2 + 3i)/((7 - 3i) + (2 + 3i)) = 2.55556 + 1.66667i
(6 + 8i) + (2.55556 + 1.66667i) = 8.55556 + 9.66667i
Z_5 := Z_1 + Z_4 = 8.55556 + 9.66667i
Z_5 = 8.55556 + 9.66667i
100/(8.55556 + 9.66667i) = 5.13409 - 5.80086i
I_1 := E/Z_5 = 5.13409 - 5.80086i
I_1 = 5.13409 - 5.80086i
U_4 := I_1*Z_4 = 22.7886 - 6.2676i
I_2 := U_4/Z_2 = 3.07453 + 0.422285i
I_3 := U_4/Z_3 = 2.05956 - 6.22314i
I_3 = 2.05956 - 6.22314i
I_1 - I_2 - I_3 = 4.44089e-16 + 8.88178e-16i
(5.13409 - 5.80086i) - (3.07453 + 0.42228i) - (2.05956 - 6.22314i) = -4.44089e-16
I_1 - I_2 - I_3 = 4.44089e-16 + 8.88178e-16i
